// enable server for python data access
#option server

clock {
	starttime '2018-01-01 00:00:00';
	stoptime '2018-01-02 00:00:00';
}

class market {
//	int32 interval; // interval at which market updates
//	intrinsic commit(TIMESTAMP t1, TIMESTAMP t2) // function to force updates at interval time
//	{
//		return (TIMESTAMP)(interval*(t1/interval+1));
//	};
}

object market {
	name rtp;
//	interval 300;
	on_precommit python "./test_py.py"; // call to precommit (must have chmod +x set)
}
